Simulations
  Simulation Test: Area=0
    DataStore
    WeatherFile: FileName=Goondiwindi.met
    Clock: StartDate=1940-01-01; EndDate=1989-12-31
    Zone Field: Area=0
      Report: Events=Clock.EndOfDay
        Variables:
          .Clock.Today
          .WeatherFile.MaxT
          .WeatherFile.MinT
          .WeatherFile.Radn
          .WeatherFile.Rain
          Manager.Model.A
      Manager Script
        A = 30
```csharp
        using System;
        using Model.Core;

        namespace Model.Components
        {
            public class Script 
            {      
               // Links
               [Link] Clock Clock;

               // Parameters
               public double A { get; set; }
               
               // Outputs
               public double B { get { return A * 9; } }

               public void OnInitialised()
               {
                  Clock.StartOfDay += OnStartOfDay;
               }

               private void OnStartOfDay()
               {
                  A++;
               }
            }
        }
```
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